L := 2.6
k := 10^6
N := 12
p := 1 .. N^2
q := 1 .. N^2
K(x, y, xc, yc) :=
    e^(1i*k*(x^2 + y^2)) if sqrt((x - xc)^2 + (y - yc)^2) < 0.8
    0 otherwise
J0(x, y, S) :=
    1/(π*S^2) if sqrt(x^2 + y^2) < S
    0 otherwise
x[p] := p*L/N - L/2 - L/(2*N)
y[q] := q*L/N - L/2 - L/(2*N)
T(f1, g1, f2, g2) := sum(sum(J0(m*L/N - L/2, n*L/N - L/2, 0.5)*K(f1, g1, m*L/N - L/2, n*L/N - L/2)*conj(K(f2, g2, m*L/N - L/2, n*L/N - L/2)), n = 0 .. N), m = 0 .. N)
TT[p, q] := |T(x[p - N*(ceil(p/N) - 1)], y[ceil(p/N)], x[q - N*(ceil(q/N) - 1)], y[ceil(q/N)])|  # disabled
TCC :=
    for a ∈ 1 .. N
        for b ∈ 1 .. N
            for i ∈ 1 .. N
                for j ∈ 1 .. N
                    M[i, j] ← T(x[a], y[b], x[i], y[j])
            MM[a, b] ← M
    transpose(MM)  # disabled
TCC[1, 1][1, 1] =  # error: This variable is undefined.
TT[p, q] := T(x[p - N*(ceil(p/N) - 1)], y[ceil(p/N)], x[q - N*(ceil(q/N) - 1)], y[ceil(q/N)])
Mask :=
    for i ∈ 0 .. N - 1
        for j ∈ 0 .. N - 1
            M[i, j] ← 1 if (j ≥ 5 and j ≤ 9) and (i == 5 or i == 7 or i == 9)
            M[i, j] ← 0 otherwise
    M
Vec := eigenvecs(TT)
# [component: inputs TT]
# [component: inputs TT]
Val := eigenvals(TT)
K := 0 .. N^2
Vec[:, 0] = [
    0; 0; 0; 0; 0; 0.00697324 + 0.00456735i; 0.00409196 + 0.0165939i; 0.00409196 + 0.0165939i; 0.00697324 + 0.00456735i; 0
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]
ϕ[K] :=
    T ← identity(N)
    for i ∈ 0 .. N - 1
        for j ∈ 0 .. N - 1
            T[i, j] ← Vec[:, K][j*N + i + 1]
    T
u := 0 .. N^2
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i := 0 .. N - 1
j := 0 .. N - 1
U[i, j] := |U[i, j]|  # error: This array index is invalid for this array.
Val = [
    730.109; 126.069; 126.069; 27.2513; 22.5468; 20.1963; 16.1872; 11.6235; 10.9459; 16.1872
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]
# [component: inputs ϕ[0]]
# [component: inputs ϕ[1]]
sum(sum(TT[p, q], q = 0 .. N^2), p = 0 .. N^2) = 2369.24
